echo both

include		in.partitions
log             log.lammps.${pid} append
include		in.temp
include		in.pressure
include		in.seed
units		metal
atom_style	atomic
read_data       water.data.equil.${pid}
include 	in.setup

timer           timeout 23:30:00 every 1000

include         in.dump

fix             1 all plumed plumedfile plumed.start.dat outfile plumed.out
fix             2 all nph x ${pressure} ${pressure} ${pressureDamp}
fix             3 all temp/csvr ${temperature} ${temperature} ${tempDamp} ${seed}
fix             4 all momentum 10000 linear 1 1 1 rescale

run             100000000 upto

write_data	data.final.${pid}
write_restart   restart.lmp.${pid}

print $(step) file Startdone.txt
